// SBML level 2 version 1

model tRNAAminoacylation()
  // tRNAAminoacylation module

  // Compartments:
  compartment c = 1;
  compartment m = 1;
  compartment e = 1;

  // Species:
  species ADP in c = 3623/c;
  species ALA in c = 8303/c;
  species AMP in c = 1449/c;
  species ARG in c = 5991/c;
  species ASN in c = 11161/c;
  species ASP in c = 9407/c;
  species ATP in c = 36234/c;
  species CYS in c = 2181/c;
  species FMET in c = 0;
  species FTHF10 in c = 2895/c;
  species GLU in c = 9518/c;
  species GLY in c = 7679/c;
  species H in c = 13042/c;
  species H2O in c = 309737899/c;
  species HIS in c = 2933/c;
  species ILE in c = 14247/c;
  species LEU in c = 17971/c;
  species LYS in c = 15094/c;
  species MET in c = 2792/c;
  species PHE in c = 7681/c;
  species PI in c = 7246/c;
  species PPI in c = 5796/c;
  species PRO in c = 4140/c;
  species SER in c = 8749/c;
  species THF in c = 2895/c;
  species THR in c = 4460/c;
  species TRP in c = 1084/c;
  species TYR in c = 5375/c;
  species VAL in c = 9500/c;
  species GLN in c = 7920/c;
  species MG471 in c = 0;
  species MG471_aa in c = 72/c;
  species MG472 in c = 0;
  species MG472_aa in c = 72/c;
  species MG475 in c = 0;
  species MG475_aa in c = 14/c;
  species MG479 in c = 0;
  species MG479_aa in c = 25/c;
  species MG483 in c = 0;
  species MG483_aa in c = 10/c;
  species MG484 in c = 0;
  species MG484_aa in c = 61/c;
  species MG485 in c = 0;
  species MG485_aa in c = 14/c;
  species MG486 in c = 0;
  species MG486_aa in c = 46/c;
  species MG487 in c = 0;
  species MG487_aa in c = 20/c;
  species MG488 in c = 0;
  species MG488_aa in c = 11/c;
  species MG489 in c = 0;
  species MG489_aa in c = 84/c;
  species MG490 in c = 0;
  species MG490_aa in c = 55/c;
  species MG492 in c = 0;
  species MG492_aa in c = 13/c;
  species MG493 in c = 0;
  species MG493_aa in c = 51/c;
  species MG495 in c = 0;
  species MG495_aa in c = 8/c;
  species MG496 in c = 0;
  species MG496_aa in c = 9/c;
  species MG497 in c = 0;
  species MG497_aa in c = 9/c;
  species MG499 in c = 0;
  species MG499_aa in c = 42/c;
  species MG500 in c = 0;
  species MG500_aa in c = 60/c;
  species MG501 in c = 0;
  species MG501_aa in c = 36/c;
  species MG502 in c = 0;
  species MG502_aa in c = 75/c;
  species MG503 in c = 0;
  species MG503_aa in c = 46/c;
  species MG504 in c = 0;
  species MG504_aa in c = 10/c;
  species MG506 in c = 0;
  species MG506_aa in c = 16/c;
  species MG507 in c = 0;
  species MG507_aa in c = 23/c;
  species MG508 in c = 0;
  species MG508_aa in c = 61/c;
  species MG509 in c = 0;
  species MG509_aa in c = 56/c;
  species MG510 in c = 0;
  species MG510_aa in c = 50/c;
  species MG511 in c = 0;
  species MG511_aa in c = 55/c;
  species MG512 in c = 0;
  species MG512_aa in c = 62/c;
  species MG513 in c = 0;
  species MG513_aa in c = 54/c;
  species MG514 in c = 0;
  species MG514_aa in c = 56/c;
  species MG518 in c = 0;
  species MG518_aa in c = 19/c;
  species MG519 in c = 0;
  species MG519_aa in c = 26/c;
  species MG520 in c = 0;
  species MG520_aa in c = 33/c;
  species MG523 in c = 0;
  species MG523_aa in c = 14/c;
  species MG_253_MONOMER in c = 16/c;
  species MG_266_MONOMER in c = 62/c;
  species MG_334_MONOMER in c = 34/c;
  species MG_345_MONOMER in c = 48/c;
  species MG_365_MONOMER in c = 18/c;
  species MG_378_MONOMER in c = 33/c;
  species MG_462_MONOMER in c = 81/c;
  species MG_005_DIMER in c = 118/c;
  species MG_021_DIMER in c = 20/c;
  species MG_035_DIMER in c = 19/c;
  species MG_036_DIMER in c = 21/c;
  species MG_098_099_100_TRIMER in c = 139/c;
  species MG_113_DIMER in c = 18/c;
  species MG_126_DIMER in c = 13/c;
  species MG_136_DIMER in c = 23/c;
  species MG_194_195_TETRAMER in c = 27/c;
  species MG_251_DIMER in c = 14/c;
  species MG_283_DIMER in c = 14/c;
  species MG_292_TETRAMER in c = 18/c;
  species MG_375_DIMER in c = 124/c;
  species MG_455_DIMER in c = 95/c;
  species MG_188_MONOMER in m = 15/m;
  species MG_189_MONOMER in m = 17/m;
  species MG_194_MONOMER in c = 0;
  species MG_195_MONOMER in c = 8/c;
  species MG_196_MONOMER in c = 206/c;
  species MG_197_MONOMER in c = 146/c;
  species MG_198_MONOMER in c = 142/c;
  species MG_201_MONOMER in c = 0;
  species MG_203_MONOMER in c = 1/c;
  species MG_204_MONOMER in c = 2/c;
  species MG_205_MONOMER in c = 1/c;
  species MG_206_MONOMER in c = 7/c;
  species MG_208_MONOMER in c = 0;
  species MG_481_MONOMER in c = 119/c;
  species MG_482_MONOMER in c = 0;
  species MG_213_MONOMER in c = 0;
  species MG_214_MONOMER in c = 4/c;
  species MG_215_MONOMER in c = 2/c;
  species MG_216_MONOMER in c = 2/c;
  species MG_221_MONOMER in c = 6/c;
  species MG_224_MONOMER in c = 0;
  species MG_225_MONOMER in m = 1/m;
  species MG_226_MONOMER in m = 1/m;
  species MG_227_MONOMER in c = 0;
  species MG_228_MONOMER in c = 3/c;
  species MG_229_MONOMER in c = 2/c;
  species MG_231_MONOMER in c = 0;
  species MG_232_MONOMER in c = 136/c;
  species MG_234_MONOMER in c = 127/c;
  species MG_239_MONOMER in c = 5/c;
  species MG_240_MONOMER in c = 3/c;
  species MG_244_MONOMER in c = 1/c;
  species MG_249_MONOMER in c = 13/c;
  species MG_250_MONOMER in c = 33/c;
  species MG_251_MONOMER in c = 1/c;
  species MG_252_MONOMER in c = 0;
  species MG_257_MONOMER in c = 114/c;
  species MG_259_MONOMER in c = 2/c;
  species MG_261_MONOMER in c = 0;
  species MG_265_MONOMER in c = 1/c;
  species MG_271_MONOMER in c = 628/c;
  species MG_272_MONOMER in c = 91/c;
  species MG_273_MONOMER in c = 34/c;
  species MG_274_MONOMER in c = 38/c;
  species MG_275_MONOMER in m = 3/m;
  species MG_276_MONOMER in c = 0;
  species MG_277_MONOMER in m = 43/m;
  species MG_278_MONOMER in c = 1/c;
  species MG_283_MONOMER in c = 1/c;
  species MG_287_MONOMER in c = 48/c;
  species MG_289_MONOMER in e = 38/e;
  species MG_290_MONOMER in c = 1/c;
  species MG_291_MONOMER in m = 25/m;
  species MG_292_MONOMER in c = 2/c;
  species MG_293_MONOMER in c = 1/c;
  species MG_295_MONOMER in c = 39/c;
  species MG_298_MONOMER in c = 7/c;
  species MG_299_MONOMER in c = 0;
  species MG_301_MONOMER in c = 2/c;
  species MG_302_MONOMER in m = 1/m;
  species MG_303_MONOMER in c = 38/c;
  species MG_304_MONOMER in c = 5/c;
  species MG_311_MONOMER in c = 97/c;
  species MG_315_MONOMER in c = 4/c;
  species MG_316_MONOMER in m = 0;
  species MG_321_MONOMER in e = 0;
  species MG_322_MONOMER in m = 2/m;
  species MG_323_MONOMER in c = 0;
  species MG_325_MONOMER in c = 132/c;
  species MG_333_MONOMER in c = 1/c;
  species MG_336_MONOMER in c = 0;
  species MG_340_MONOMER in c = 11/c;
  species MG_341_MONOMER in c = 0;
  species MG_346_MONOMER in c = 1/c;
  species MG_347_MONOMER in c = 1/c;
  species MG_349_MONOMER in c = 1/c;
  species MG_351_MONOMER in c = 4/c;
  species MG_352_MONOMER in c = 0;
  species MG_353_MONOMER in c = 1/c;
  species MG_355_MONOMER in c = 2/c;
  species MG_357_MONOMER in c = 1/c;
  species MG_358_MONOMER in c = 35/c;
  species MG_359_MONOMER in c = 4/c;
  species MG_361_MONOMER in c = 107/c;
  species MG_362_MONOMER in c = 118/c;
  species MG_363_MONOMER in c = 118/c;
  species MG_522_MONOMER in c = 99/c;
  species MG_367_MONOMER in c = 0;
  species MG_368_MONOMER in c = 1/c;
  species MG_369_MONOMER in c = 0;
  species MG_372_MONOMER in c = 1/c;
  species MG_375_MONOMER in c = 1/c;
  species MG_376_MONOMER in c = 3/c;
  species MG_379_MONOMER in c = 0;
  species MG_382_MONOMER in c = 2/c;
  species MG_383_MONOMER in c = 0;
  species MG_385_MONOMER in c = 0;
  species MG_390_MONOMER in m = 1/m;
  species MG_391_MONOMER in c = 4/c;
  species MG_392_MONOMER in c = 3/c;
  species MG_393_MONOMER in c = 97/c;
  species MG_394_MONOMER in c = 3/c;
  species MG_396_MONOMER in c = 0;
  species MG_398_MONOMER in c = 2/c;
  species MG_399_MONOMER in c = 0;
  species MG_400_MONOMER in c = 31/c;
  species MG_401_MONOMER in c = 16/c;
  species MG_402_MONOMER in c = 77/c;
  species MG_403_MONOMER in m = 124/m;
  species MG_404_MONOMER in m = 26/m;
  species MG_405_MONOMER in m = 124/m;
  species MG_407_MONOMER in c = 0;
  species MG_409_MONOMER in c = 0;
  species MG_410_MONOMER in c = 0;
  species MG_411_MONOMER in m = 15/m;
  species MG_412_MONOMER in e = 28/e;
  species MG_417_MONOMER in c = 123/c;
  species MG_418_MONOMER in c = 114/c;
  species MG_419_MONOMER in c = 2/c;
  species MG_421_MONOMER in c = 20/c;
  species MG_424_MONOMER in c = 119/c;
  species MG_425_MONOMER in c = 0;
  species MG_426_MONOMER in c = 152/c;
  species MG_427_MONOMER in c = 0;
  species MG_428_MONOMER in c = 1/c;
  species MG_429_MONOMER in c = 0;
  species MG_431_MONOMER in c = 1/c;
  species MG_433_MONOMER in c = 0;
  species MG_434_MONOMER in c = 3/c;
  species MG_437_MONOMER in m = 1/m;
  species MG_444_MONOMER in c = 140/c;
  species MG_445_MONOMER in c = 1/c;
  species MG_446_MONOMER in c = 109/c;
  species MG_451_MONOMER in c = 0;
  species MG_453_MONOMER in c = 1/c;
  species MG_454_MONOMER in c = 0;
  species MG_455_MONOMER in c = 1/c;
  species MG_457_MONOMER in m = 4/m;
  species MG_458_MONOMER in c = 2/c;
  species MG_460_MONOMER in c = 0;
  species MG_464_MONOMER in m = 0;
  species MG_465_MONOMER in c = 11/c;
  species MG_466_MONOMER in c = 134/c;
  species MG_467_MONOMER in c = 13/c;
  species MG_468_MONOMER in m = 1/m;
  species MG_526_MONOMER in c = 6/c;
  species MG_469_MONOMER in c = 0;
  species MGrrnA16S in c = 0;
  species MGrrnA23S in c = 0;
  species MGrrnA5S in c = 29/c;
  species MG_0001 in c = 0;
  species MG_0003 in c = 0;
  species DNA_GYRASE in c = 50/c;
  species DNA_POLYMERASE_CORE in c = 26/c;
  species DNA_POLYMERASE_CORE_BETA_CLAMP_GAMMA_COMPLEX in c = 0;
  species DNA_POLYMERASE_CORE_BETA_CLAMP_PRIMASE in c = 0;
  species DNA_POLYMERASE_GAMMA_COMPLEX in c = 14/c;
  species DNA_POLYMERASE_HOLOENZYME in c = 0;
  species MG_0001_048 in c = 29/c;
  species MG_0003_465 in c = 25/c;
  species MG_001_DIMER in c = 0;
  species MG_006_DIMER in c = 134/c;
  species MG_008_379_TETRAMER in c = 18/c;
  species MG_013_DIMER in c = 9/c;
  species MG_014_015_DIMER in m = 21/m;
  species MG_019_DIMER in c = 25/c;
  species MG_023_DIMER in c = 127/c;
  species MG_029_DIMER in c = 21/c;
  species MG_030_TRIMER in c = 15/c;
  species MG_033_TETRAMER in m = 16/m;
  species MG_034_DIMER in c = 23/c;
  species MG_038_TETRAMER in c = 15/c;
  species MG_039_DIMER in c = 12/c;
  species MG_040_119_120_121_PENTAMER in m = 44/m;
  species MG_041_062_429_PENTAMER in m = 17/m;
  species MG_041_069_429_PENTAMER in m = 8/m;
  species MG_042_043_044_045_PENTAMER in m = 18/m;
  species MG_046_DIMER in c = 21/c;
  species MG_047_TETRAMER in c = 13/c;
  species MG_049_HEXAMER in c = 21/c;
  species MG_051_DIMER in c = 59/c;
  species MG_052_DIMER in c = 32/c;
  species MG_053_TRIMER in c = 23/c;
  species MG_055_170_277_464_476_20MER in m = 13/m;
  species MG_058_HEXAMER in c = 8/c;
  species MG_063_DIMER in c = 20/c;
  species MG_064_065_TETRAMER in m = 16/m;
  species MG_066_DIMER in c = 24/c;
  species MG_072_DIMER in c = 13/c;
  species MG_073_206_421_TETRAMER in c = 16/c;
  species MG_077_078_079_080_321_PENTAMER in m = 7/m;
  species MG_084_TETRAMER in c = 18/c;
  species MG_085_HEXAMER in c = 14/c;
  species MG_089_DIMER in c = 133/c;
  species MG_091_OCTAMER in c = 0;
  species MG_091_TETRAMER in c = 65/c;
  species MG_094_HEXAMER in c = 36/c;
  species MG_102_DIMER in c = 22/c;
  species MG_102_DIMER_ox in c = 0;
  species MG_105_OCTAMER in c = 11/c;
  species MG_106_DIMER in c = 22/c;
  species MG_107_DIMER in c = 25/c;
  species MG_109_DIMER in m = 34/m;
  species MG_111_DIMER in c = 18/c;
  species MG_112_DIMER in c = 19/c;
  species MG_114_DIMER in m = 19/m;
  species MG_118_DIMER in c = 12/c;
  species MG_123_DIMER in m = 11/m;
  species MG_124_MONOMER_ox in c = 0;
  species MG_127_MONOMER_ox in c = 0;
  species MG_128_HEXAMER in c = 9/c;
  species MG_132_DIMER in c = 14/c;
  species MG_137_DIMER in c = 25/c;
  species MG_139_DIMER in c = 10/c;
  species MG_179_180_181_TETRAMER in m = 14/m;
  species MG_182_DIMER in c = 13/c;
  species MG_184_DIMER in c = 29/c;
  species MG_186_187_188_189_PENTAMER in m = 18/m;
  species MG_201_DIMER in c = 11/c;
  species MG_203_204_TETRAMER in c = 12/c;
  species MG_205_DIMER in c = 23/c;
  species MG_208_DIMER in c = 24/c;
  species MG_213_214_298_6MER in c = 5/c;
  species MG_213_214_298_6MER_ADP in c = 81/c;
  species MG_215_TETRAMER in c = 18/c;
  species MG_216_TETRAMER in c = 19/c;
  species MG_221_OCTAMER in c = 12/c;
  species MG_224_2MER_GTP in c = 1/c;
  species MG_224_3MER_GTP in c = 1/c;
  species MG_224_4MER_GTP in c = 2/c;
  species MG_224_5MER_GTP in c = 3/c;
  species MG_224_6MER_GTP in c = 5/c;
  species MG_224_7MER_GTP in c = 8/c;
  species MG_224_8MER_GTP in c = 12/c;
  species MG_224_9MER_GDP in c = 0;
  species MG_224_9MER_GTP in c = 20/c;
  species MG_224_MONOMER_GDP in c = 3/c;
  species MG_224_MONOMER_GTP in c = 6/c;
  species MG_225_DIMER in m = 15/m;
  species MG_226_DIMER in m = 14/m;
  species MG_227_DIMER in c = 22/c;
  species MG_228_TETRAMER in c = 15/c;
  species MG_229_231_TETRAMER in c = 30/c;
  species MG_229_231_TETRAMER_ox in c = 0;
  species MG_239_HEXAMER in c = 14/c;
  species MG_240_HEXAMER in c = 13/c;
  species MG_244_DIMER in c = 8/c;
  species MG_252_DIMER in c = 9/c;
  species MG_259_TETRAMER in c = 48/c;
  species MG_265_DIMER in c = 40/c;
  species MG_271_272_273_274_192MER in c = 11/c;
  species MG_271_272_273_274_192MER_ox in c = 0;
  species MG_275_TETRAMER in m = 242/m;
  species MG_276_DIMER in c = 24/c;
  species MG_278_DIMER in c = 16/c;
  species MG_287_MONOMER_ACP in c = 0;
  species MG_287_MONOMER_ddcaACP in c = 0;
  species MG_287_MONOMER_hdeACP in c = 0;
  species MG_287_MONOMER_myrsACP in c = 0;
  species MG_287_MONOMER_ocdcaACP in c = 0;
  species MG_287_MONOMER_octeACP in c = 0;
  species MG_287_MONOMER_palmACP in c = 0;
  species MG_287_MONOMER_tdeACP in c = 0;
  species MG_289_290_291_PENTAMER in m = 15/m;
  species MG_293_DIMER in c = 33/c;
  species MG_295_MONOMER_ox in c = 0;
  species MG_299_DIMER in c = 22/c;
  species MG_301_TETRAMER in c = 15/c;
  species MG_302_303_304_TETRAMER in m = 16/m;
  species MG_316_DIMER in m = 21/m;
  species MG_322_323_TETRAMER in m = 10/m;
  species MG_333_DIMER in c = 15/c;
  species MG_336_DIMER in c = 15/c;
  species MG_346_DIMER in c = 13/c;
  species MG_347_DIMER in c = 11/c;
  species MG_349_HEXAMER in c = 13/c;
  species MG_351_HEXAMER in c = 11/c;
  species MG_352_DIMER in c = 18/c;
  species MG_353_DIMER in c = 16/c;
  species MG_355_HEXAMER in c = 13/c;
  species MG_357_DIMER in c = 54/c;
  species MG_358_359_10MER in c = 13/c;
  species MG_367_DIMER in c = 13/c;
  species MG_368_DIMER in c = 14/c;
  species MG_369_DIMER in c = 14/c;
  species MG_372_DIMER in c = 108/c;
  species MG_376_HEXAMER in c = 16/c;
  species MG_382_TETRAMER in c = 10/c;
  species MG_383_DIMER in c = 16/c;
  species MG_385_DIMER in c = 10/c;
  species MG_390_DIMER in m = 16/m;
  species MG_391_HEXAMER in c = 35/c;
  species MG_392_393_21MER in c = 13/c;
  species MG_394_TETRAMER in c = 14/c;
  species MG_396_DIMER in c = 27/c;
  species MG_398_399_400_401_402_403_404_405_22MER in m = 11/m;
  species MG_407_DIMER in c = 34/c;
  species MG_409_DIMER in c = 16/c;
  species MG_410_411_412_PENTAMER in m = 17/m;
  species MG_425_DIMER in c = 9/c;
  species MG_427_DIMER in c = 17/c;
  species MG_427_DIMER_ox in c = 0;
  species MG_428_DIMER in c = 10/c;
  species MG_431_DIMER in c = 25/c;
  species MG_433_DIMER in c = 122/c;
  species MG_434_HEXAMER in c = 14/c;
  species MG_437_DIMER in m = 13/m;
  species MG_445_DIMER in c = 107/c;
  species MG_451_DIMER in c = 139/c;
  species MG_453_TETRAMER in c = 9/c;
  species MG_454_DIMER in c = 29/c;
  species MG_454_DIMER_ox in c = 0;
  species MG_457_HEXAMER in m = 70/m;
  species MG_458_TETRAMER in c = 17/c;
  species MG_460_TETRAMER in c = 13/c;
  species MG_467_468_526_TETRAMER in m = 26/m;
  species MG_469_1MER_ADP in c = 0;
  species MG_469_1MER_ATP in c = 25/c;
  species MG_469_2MER_1ATP_ADP in c = 0;
  species MG_469_2MER_ATP in c = 0;
  species MG_469_3MER_2ATP_ADP in c = 0;
  species MG_469_3MER_ATP in c = 0;
  species MG_469_4MER_3ATP_ADP in c = 0;
  species MG_469_4MER_ATP in c = 0;
  species MG_469_5MER_4ATP_ADP in c = 0;
  species MG_469_5MER_ATP in c = 0;
  species MG_469_6MER_5ATP_ADP in c = 0;
  species MG_469_6MER_ATP in c = 0;
  species MG_469_7MER_6ATP_ADP in c = 0;
  species MG_469_7MER_ATP in c = 4/c;
  species MG_482_DIMER in c = 13/c;
  species REPLISOME in c = 0;
  species RIBOSOME_30S in c = 25/c;
  species RIBOSOME_30S_IF3 in c = 0;
  species RIBOSOME_50S in c = 12/c;
  species RIBOSOME_70S in c = 56/c;
  species RNA_POLYMERASE in c = 40/c;
  species RNA_POLYMERASE_HOLOENZYME in c = 0;

  // Parameters:
  k_tRnaAa_MG471 = 7.6;
  k_tRnaAa_MG472 = 4.2627;
  k_tRnaAa_MG475 = 7.6;
  k_tRnaAa_MG479 = 90;
  k_tRnaAa_MG483 = 141.9;
  k_tRnaAa_MG484 = 14;
  k_tRnaAa_MG485 = 3.2;
  k_tRnaAa_MG486 = 4.2627;
  k_tRnaAa_MG487 = 7.6;
  k_tRnaAa_MG488 = 10.8;
  k_tRnaAa_MG489 = 7.6;
  k_tRnaAa_MG490 = 5.4;
  k_tRnaAa_MG492 = 2.8;
  k_tRnaAa_MG493 = 7.6;
  k_tRnaAa_MG495 = 2.8;
  k_tRnaAa_MG496 = 7.6;
  k_tRnaAa_MG497 = 2.8;
  k_tRnaAa_MG499 = 7.6;
  k_tRnaAa_MG500 = 5.1;
  k_tRnaAa_MG501 = 7.6;
  k_tRnaAa_MG502 = 5.36;
  k_tRnaAa_MG503 = 0.74;
  k_tRnaAa_MG504 = 7.6;
  k_tRnaAa_MG506 = 7.6;
  k_tRnaAa_MG507 = 7.6;
  k_tRnaAa_MG508 = 5.1;
  k_tRnaAa_MG509 = 7.6;
  k_tRnaAa_MG510 = 90;
  k_tRnaAa_MG511 = 7.6;
  k_tRnaAa_MG512 = 90;
  k_tRnaAa_MG513 = 4.4;
  k_tRnaAa_MG514 = 27;
  k_tRnaAa_MG518 = 142;
  k_tRnaAa_MG519 = 5.1;
  k_tRnaAa_MG520 = 5.1;
  k_tRnaAa_MG523 = 2.8;

  // Reactions:
  Aminoacylation_MG471: MG471 + ALA + ATP -> MG471_aa + AMP + PPI; k_tRnaAa_MG471*MG471*ALA*ATP*MG_292_TETRAMER*(1 + MG471*Aminoacylation_MG471_KM1^(-1) + ALA*Aminoacylation_MG471_KM2^(-1) + ATP*Aminoacylation_MG471_KM3^(-1))^(-1); Aminoacylation_MG471 is "Aminoacylation (MG471)";  // modifiers: MG_292_TETRAMER
    Aminoacylation_MG471_KM1 = 1; Aminoacylation_MG471_KM2 = 1; Aminoacylation_MG471_KM3 = 1;
  Aminoacylation_MG472: MG472 + ATP + ILE -> MG472_aa + AMP + PPI; k_tRnaAa_MG472*MG472*ATP*ILE*MG_345_MONOMER*(1 + MG472*Aminoacylation_MG472_KM1^(-1) + ATP*Aminoacylation_MG472_KM2^(-1) + ILE*Aminoacylation_MG472_KM3^(-1))^(-1); Aminoacylation_MG472 is "Aminoacylation (MG472)";  // modifiers: MG_345_MONOMER
    Aminoacylation_MG472_KM1 = 1; Aminoacylation_MG472_KM2 = 1; Aminoacylation_MG472_KM3 = 1;
  Aminoacylation_MG475: MG475 + ATP + SER -> MG475_aa + AMP + PPI; k_tRnaAa_MG475*MG475*ATP*SER*MG_005_DIMER*(1 + MG475*Aminoacylation_MG475_KM1^(-1) + ATP*Aminoacylation_MG475_KM2^(-1) + SER*Aminoacylation_MG475_KM3^(-1))^(-1); Aminoacylation_MG475 is "Aminoacylation (MG475)";  // modifiers: MG_005_DIMER
    Aminoacylation_MG475_KM1 = 1; Aminoacylation_MG475_KM2 = 1; Aminoacylation_MG475_KM3 = 1;
  Aminoacylation_MG479: MG479 + ATP + THR -> MG479_aa + AMP + PPI; k_tRnaAa_MG479*MG479*ATP*THR*MG_375_DIMER*(1 + MG479*Aminoacylation_MG479_KM1^(-1) + ATP*Aminoacylation_MG479_KM2^(-1) + THR*Aminoacylation_MG479_KM3^(-1))^(-1); Aminoacylation_MG479 is "Aminoacylation (MG479)";  // modifiers: MG_375_DIMER
    Aminoacylation_MG479_KM1 = 1; Aminoacylation_MG479_KM2 = 1; Aminoacylation_MG479_KM3 = 1;
  Aminoacylation_MG483: MG483 + ATP + CYS -> MG483_aa + AMP + PPI; k_tRnaAa_MG483*MG483*ATP*CYS*MG_253_MONOMER*(1 + MG483*Aminoacylation_MG483_KM1^(-1) + ATP*Aminoacylation_MG483_KM2^(-1) + CYS*Aminoacylation_MG483_KM3^(-1))^(-1); Aminoacylation_MG483 is "Aminoacylation (MG483)";  // modifiers: MG_253_MONOMER
    Aminoacylation_MG483_KM1 = 1; Aminoacylation_MG483_KM2 = 1; Aminoacylation_MG483_KM3 = 1;
  Aminoacylation_MG484: MG484 + ATP + PRO -> MG484_aa + AMP + PPI; k_tRnaAa_MG484*MG484*ATP*PRO*MG_283_DIMER*(1 + MG484*Aminoacylation_MG484_KM1^(-1) + ATP*Aminoacylation_MG484_KM2^(-1) + PRO*Aminoacylation_MG484_KM3^(-1))^(-1); Aminoacylation_MG484 is "Aminoacylation (MG484)";  // modifiers: MG_283_DIMER
    Aminoacylation_MG484_KM1 = 1; Aminoacylation_MG484_KM2 = 1; Aminoacylation_MG484_KM3 = 1;
  Aminoacylation_MG485: MG485 + ATP + MET -> MG485_aa + AMP + PPI; k_tRnaAa_MG485*MG485*ATP*MET*MG_021_DIMER*(1 + MG485*Aminoacylation_MG485_KM1^(-1) + ATP*Aminoacylation_MG485_KM2^(-1) + MET*Aminoacylation_MG485_KM3^(-1))^(-1); Aminoacylation_MG485 is "Aminoacylation (MG485)";  // modifiers: MG_021_DIMER
    Aminoacylation_MG485_KM1 = 1; Aminoacylation_MG485_KM2 = 1; Aminoacylation_MG485_KM3 = 1;
  Aminoacylation_MG486: MG486 + ATP + ILE -> MG486_aa + AMP + PPI; k_tRnaAa_MG486*MG486*ATP*ILE*MG_345_MONOMER*(1 + MG486*Aminoacylation_MG486_KM1^(-1) + ATP*Aminoacylation_MG486_KM2^(-1) + ILE*Aminoacylation_MG486_KM3^(-1))^(-1); Aminoacylation_MG486 is "Aminoacylation (MG486)";  // modifiers: MG_345_MONOMER
    Aminoacylation_MG486_KM1 = 1; Aminoacylation_MG486_KM2 = 1; Aminoacylation_MG486_KM3 = 1;
  Aminoacylation_MG487: MG487 + ATP + SER -> MG487_aa + AMP + PPI; k_tRnaAa_MG487*MG487*ATP*SER*MG_005_DIMER*(1 + MG487*Aminoacylation_MG487_KM1^(-1) + ATP*Aminoacylation_MG487_KM2^(-1) + SER*Aminoacylation_MG487_KM3^(-1))^(-1); Aminoacylation_MG487 is "Aminoacylation (MG487)";  // modifiers: MG_005_DIMER
    Aminoacylation_MG487_KM1 = 1; Aminoacylation_MG487_KM2 = 1; Aminoacylation_MG487_KM3 = 1;
  Aminoacylation_MG488: MG488 + ATP + FTHF10 + MET -> MG488_aa + AMP + PPI + THF; k_tRnaAa_MG488*MG488*ATP*FTHF10*MET*MG_365_MONOMER*MG_021_DIMER*(1 + MG488*Aminoacylation_MG488_KM1^(-1) + ATP*Aminoacylation_MG488_KM2^(-1) + FTHF10*Aminoacylation_MG488_KM3^(-1) + MET*Aminoacylation_MG488_KM4^(-1))^(-1); Aminoacylation_MG488 is "Aminoacylation (MG488)";  // modifiers: MG_365_MONOMER, MG_021_DIMER
    Aminoacylation_MG488_KM1 = 1; Aminoacylation_MG488_KM2 = 1; Aminoacylation_MG488_KM3 = 1; Aminoacylation_MG488_KM4 = 1;
  Aminoacylation_MG489: MG489 + ASP + ATP -> MG489_aa + AMP + PPI; k_tRnaAa_MG489*MG489*ASP*ATP*MG_036_DIMER*(1 + MG489*Aminoacylation_MG489_KM1^(-1) + ASP*Aminoacylation_MG489_KM2^(-1) + ATP*Aminoacylation_MG489_KM3^(-1))^(-1); Aminoacylation_MG489 is "Aminoacylation (MG489)";  // modifiers: MG_036_DIMER
    Aminoacylation_MG489_KM1 = 1; Aminoacylation_MG489_KM2 = 1; Aminoacylation_MG489_KM3 = 1;
  Aminoacylation_MG490: MG490 + ATP + PHE -> MG490_aa + AMP + PPI; k_tRnaAa_MG490*MG490*ATP*PHE*MG_194_195_TETRAMER*(1 + MG490*Aminoacylation_MG490_KM1^(-1) + ATP*Aminoacylation_MG490_KM2^(-1) + PHE*Aminoacylation_MG490_KM3^(-1))^(-1); Aminoacylation_MG490 is "Aminoacylation (MG490)";  // modifiers: MG_194_195_TETRAMER
    Aminoacylation_MG490_KM1 = 1; Aminoacylation_MG490_KM2 = 1; Aminoacylation_MG490_KM3 = 1;
  Aminoacylation_MG492: MG492 + ARG + ATP -> MG492_aa + AMP + PPI; k_tRnaAa_MG492*MG492*ARG*ATP*MG_378_MONOMER*(1 + MG492*Aminoacylation_MG492_KM1^(-1) + ARG*Aminoacylation_MG492_KM2^(-1) + ATP*Aminoacylation_MG492_KM3^(-1))^(-1); Aminoacylation_MG492 is "Aminoacylation (MG492)";  // modifiers: MG_378_MONOMER
    Aminoacylation_MG492_KM1 = 1; Aminoacylation_MG492_KM2 = 1; Aminoacylation_MG492_KM3 = 1;
  Aminoacylation_MG493: MG493 + ATP + GLY -> MG493_aa + AMP + PPI; k_tRnaAa_MG493*MG493*ATP*GLY*MG_251_DIMER*(1 + MG493*Aminoacylation_MG493_KM1^(-1) + ATP*Aminoacylation_MG493_KM2^(-1) + GLY*Aminoacylation_MG493_KM3^(-1))^(-1); Aminoacylation_MG493 is "Aminoacylation (MG493)";  // modifiers: MG_251_DIMER
    Aminoacylation_MG493_KM1 = 1; Aminoacylation_MG493_KM2 = 1; Aminoacylation_MG493_KM3 = 1;
  Aminoacylation_MG495: MG495 + ARG + ATP -> MG495_aa + AMP + PPI; k_tRnaAa_MG495*MG495*ARG*ATP*MG_378_MONOMER*(1 + MG495*Aminoacylation_MG495_KM1^(-1) + ARG*Aminoacylation_MG495_KM2^(-1) + ATP*Aminoacylation_MG495_KM3^(-1))^(-1); Aminoacylation_MG495 is "Aminoacylation (MG495)";  // modifiers: MG_378_MONOMER
    Aminoacylation_MG495_KM1 = 1; Aminoacylation_MG495_KM2 = 1; Aminoacylation_MG495_KM3 = 1;
  Aminoacylation_MG496: MG496 + ATP + TRP -> MG496_aa + AMP + PPI; k_tRnaAa_MG496*MG496*ATP*TRP*MG_126_DIMER*(1 + MG496*Aminoacylation_MG496_KM1^(-1) + ATP*Aminoacylation_MG496_KM2^(-1) + TRP*Aminoacylation_MG496_KM3^(-1))^(-1); Aminoacylation_MG496 is "Aminoacylation (MG496)";  // modifiers: MG_126_DIMER
    Aminoacylation_MG496_KM1 = 1; Aminoacylation_MG496_KM2 = 1; Aminoacylation_MG496_KM3 = 1;
  Aminoacylation_MG497: MG497 + ARG + ATP -> MG497_aa + AMP + PPI; k_tRnaAa_MG497*MG497*ARG*ATP*MG_378_MONOMER*(1 + MG497*Aminoacylation_MG497_KM1^(-1) + ARG*Aminoacylation_MG497_KM2^(-1) + ATP*Aminoacylation_MG497_KM3^(-1))^(-1); Aminoacylation_MG497 is "Aminoacylation (MG497)";  // modifiers: MG_378_MONOMER
    Aminoacylation_MG497_KM1 = 1; Aminoacylation_MG497_KM2 = 1; Aminoacylation_MG497_KM3 = 1;
  Aminoacylation_MG499: MG499 + ATP + GLY -> MG499_aa + AMP + PPI; k_tRnaAa_MG499*MG499*ATP*GLY*MG_251_DIMER*(1 + MG499*Aminoacylation_MG499_KM1^(-1) + ATP*Aminoacylation_MG499_KM2^(-1) + GLY*Aminoacylation_MG499_KM3^(-1))^(-1); Aminoacylation_MG499 is "Aminoacylation (MG499)";  // modifiers: MG_251_DIMER
    Aminoacylation_MG499_KM1 = 1; Aminoacylation_MG499_KM2 = 1; Aminoacylation_MG499_KM3 = 1;
  Aminoacylation_MG500: MG500 + ATP + LEU -> MG500_aa + AMP + PPI; k_tRnaAa_MG500*MG500*ATP*LEU*MG_266_MONOMER*(1 + MG500*Aminoacylation_MG500_KM1^(-1) + ATP*Aminoacylation_MG500_KM2^(-1) + LEU*Aminoacylation_MG500_KM3^(-1))^(-1); Aminoacylation_MG500 is "Aminoacylation (MG500)";  // modifiers: MG_266_MONOMER
    Aminoacylation_MG500_KM1 = 1; Aminoacylation_MG500_KM2 = 1; Aminoacylation_MG500_KM3 = 1;
  Aminoacylation_MG501: MG501 + ATP + LYS -> MG501_aa + AMP + PPI; k_tRnaAa_MG501*MG501*ATP*LYS*MG_136_DIMER*(1 + MG501*Aminoacylation_MG501_KM1^(-1) + ATP*Aminoacylation_MG501_KM2^(-1) + LYS*Aminoacylation_MG501_KM3^(-1))^(-1); Aminoacylation_MG501 is "Aminoacylation (MG501)";  // modifiers: MG_136_DIMER
    Aminoacylation_MG501_KM1 = 1; Aminoacylation_MG501_KM2 = 1; Aminoacylation_MG501_KM3 = 1;
  Aminoacylation_MG502: MG502 + 2 ATP + H2O + GLN -> MG502_aa + ADP + AMP + H + PI + PPI; k_tRnaAa_MG502*MG502*ATP*H2O*GLN*MG_462_MONOMER*MG_098_099_100_TRIMER*(1 + MG502*Aminoacylation_MG502_KM1^(-1) + ATP*Aminoacylation_MG502_KM2^(-1) + H2O*Aminoacylation_MG502_KM3^(-1) + GLN*Aminoacylation_MG502_KM4^(-1))^(-1); Aminoacylation_MG502 is "Aminoacylation (MG502)";  // modifiers: MG_462_MONOMER, MG_098_099_100_TRIMER
    Aminoacylation_MG502_KM1 = 1; Aminoacylation_MG502_KM2 = 1; Aminoacylation_MG502_KM3 = 1; Aminoacylation_MG502_KM4 = 1;
  Aminoacylation_MG503: MG503 + ATP + TYR -> MG503_aa + AMP + PPI; k_tRnaAa_MG503*MG503*ATP*TYR*MG_455_DIMER*(1 + MG503*Aminoacylation_MG503_KM1^(-1) + ATP*Aminoacylation_MG503_KM2^(-1) + TYR*Aminoacylation_MG503_KM3^(-1))^(-1); Aminoacylation_MG503 is "Aminoacylation (MG503)";  // modifiers: MG_455_DIMER
    Aminoacylation_MG503_KM1 = 1; Aminoacylation_MG503_KM2 = 1; Aminoacylation_MG503_KM3 = 1;
  Aminoacylation_MG504: MG504 + ATP + TRP -> MG504_aa + AMP + PPI; k_tRnaAa_MG504*MG504*ATP*TRP*MG_126_DIMER*(1 + MG504*Aminoacylation_MG504_KM1^(-1) + ATP*Aminoacylation_MG504_KM2^(-1) + TRP*Aminoacylation_MG504_KM3^(-1))^(-1); Aminoacylation_MG504 is "Aminoacylation (MG504)";  // modifiers: MG_126_DIMER
    Aminoacylation_MG504_KM1 = 1; Aminoacylation_MG504_KM2 = 1; Aminoacylation_MG504_KM3 = 1;
  Aminoacylation_MG506: MG506 + ATP + SER -> MG506_aa + AMP + PPI; k_tRnaAa_MG506*MG506*ATP*SER*MG_005_DIMER*(1 + MG506*Aminoacylation_MG506_KM1^(-1) + ATP*Aminoacylation_MG506_KM2^(-1) + SER*Aminoacylation_MG506_KM3^(-1))^(-1); Aminoacylation_MG506 is "Aminoacylation (MG506)";  // modifiers: MG_005_DIMER
    Aminoacylation_MG506_KM1 = 1; Aminoacylation_MG506_KM2 = 1; Aminoacylation_MG506_KM3 = 1;
  Aminoacylation_MG507: MG507 + ATP + SER -> MG507_aa + AMP + PPI; k_tRnaAa_MG507*MG507*ATP*SER*MG_005_DIMER*(1 + MG507*Aminoacylation_MG507_KM1^(-1) + ATP*Aminoacylation_MG507_KM2^(-1) + SER*Aminoacylation_MG507_KM3^(-1))^(-1); Aminoacylation_MG507 is "Aminoacylation (MG507)";  // modifiers: MG_005_DIMER
    Aminoacylation_MG507_KM1 = 1; Aminoacylation_MG507_KM2 = 1; Aminoacylation_MG507_KM3 = 1;
  Aminoacylation_MG508: MG508 + ATP + LEU -> MG508_aa + AMP + PPI; k_tRnaAa_MG508*MG508*ATP*LEU*MG_266_MONOMER*(1 + MG508*Aminoacylation_MG508_KM1^(-1) + ATP*Aminoacylation_MG508_KM2^(-1) + LEU*Aminoacylation_MG508_KM3^(-1))^(-1); Aminoacylation_MG508 is "Aminoacylation (MG508)";  // modifiers: MG_266_MONOMER
    Aminoacylation_MG508_KM1 = 1; Aminoacylation_MG508_KM2 = 1; Aminoacylation_MG508_KM3 = 1;
  Aminoacylation_MG509: MG509 + ATP + LYS -> MG509_aa + AMP + PPI; k_tRnaAa_MG509*MG509*ATP*LYS*MG_136_DIMER*(1 + MG509*Aminoacylation_MG509_KM1^(-1) + ATP*Aminoacylation_MG509_KM2^(-1) + LYS*Aminoacylation_MG509_KM3^(-1))^(-1); Aminoacylation_MG509 is "Aminoacylation (MG509)";  // modifiers: MG_136_DIMER
    Aminoacylation_MG509_KM1 = 1; Aminoacylation_MG509_KM2 = 1; Aminoacylation_MG509_KM3 = 1;
  Aminoacylation_MG510: MG510 + ATP + THR -> MG510_aa + AMP + PPI; k_tRnaAa_MG510*MG510*ATP*THR*MG_375_DIMER*(1 + MG510*Aminoacylation_MG510_KM1^(-1) + ATP*Aminoacylation_MG510_KM2^(-1) + THR*Aminoacylation_MG510_KM3^(-1))^(-1); Aminoacylation_MG510 is "Aminoacylation (MG510)";  // modifiers: MG_375_DIMER
    Aminoacylation_MG510_KM1 = 1; Aminoacylation_MG510_KM2 = 1; Aminoacylation_MG510_KM3 = 1;
  Aminoacylation_MG511: MG511 + ATP + VAL -> MG511_aa + AMP + PPI; k_tRnaAa_MG511*MG511*ATP*VAL*MG_334_MONOMER*(1 + MG511*Aminoacylation_MG511_KM1^(-1) + ATP*Aminoacylation_MG511_KM2^(-1) + VAL*Aminoacylation_MG511_KM3^(-1))^(-1); Aminoacylation_MG511 is "Aminoacylation (MG511)";  // modifiers: MG_334_MONOMER
    Aminoacylation_MG511_KM1 = 1; Aminoacylation_MG511_KM2 = 1; Aminoacylation_MG511_KM3 = 1;
  Aminoacylation_MG512: MG512 + ATP + THR -> MG512_aa + AMP + PPI; k_tRnaAa_MG512*MG512*ATP*THR*MG_375_DIMER*(1 + MG512*Aminoacylation_MG512_KM1^(-1) + ATP*Aminoacylation_MG512_KM2^(-1) + THR*Aminoacylation_MG512_KM3^(-1))^(-1); Aminoacylation_MG512 is "Aminoacylation (MG512)";  // modifiers: MG_375_DIMER
    Aminoacylation_MG512_KM1 = 1; Aminoacylation_MG512_KM2 = 1; Aminoacylation_MG512_KM3 = 1;
  Aminoacylation_MG513: MG513 + ATP + GLU -> MG513_aa + AMP + PPI; k_tRnaAa_MG513*MG513*ATP*GLU*MG_462_MONOMER*(1 + MG513*Aminoacylation_MG513_KM1^(-1) + ATP*Aminoacylation_MG513_KM2^(-1) + GLU*Aminoacylation_MG513_KM3^(-1))^(-1); Aminoacylation_MG513 is "Aminoacylation (MG513)";  // modifiers: MG_462_MONOMER
    Aminoacylation_MG513_KM1 = 1; Aminoacylation_MG513_KM2 = 1; Aminoacylation_MG513_KM3 = 1;
  Aminoacylation_MG514: MG514 + ASN + ATP -> MG514_aa + AMP + PPI; k_tRnaAa_MG514*MG514*ASN*ATP*MG_113_DIMER*(1 + MG514*Aminoacylation_MG514_KM1^(-1) + ASN*Aminoacylation_MG514_KM2^(-1) + ATP*Aminoacylation_MG514_KM3^(-1))^(-1); Aminoacylation_MG514 is "Aminoacylation (MG514)";  // modifiers: MG_113_DIMER
    Aminoacylation_MG514_KM1 = 1; Aminoacylation_MG514_KM2 = 1; Aminoacylation_MG514_KM3 = 1;
  Aminoacylation_MG518: MG518 + ATP + HIS -> MG518_aa + AMP + PPI; k_tRnaAa_MG518*MG518*ATP*HIS*MG_035_DIMER*(1 + MG518*Aminoacylation_MG518_KM1^(-1) + ATP*Aminoacylation_MG518_KM2^(-1) + HIS*Aminoacylation_MG518_KM3^(-1))^(-1); Aminoacylation_MG518 is "Aminoacylation (MG518)";  // modifiers: MG_035_DIMER
    Aminoacylation_MG518_KM1 = 1; Aminoacylation_MG518_KM2 = 1; Aminoacylation_MG518_KM3 = 1;
  Aminoacylation_MG519: MG519 + ATP + LEU -> MG519_aa + AMP + PPI; k_tRnaAa_MG519*MG519*ATP*LEU*MG_266_MONOMER*(1 + MG519*Aminoacylation_MG519_KM1^(-1) + ATP*Aminoacylation_MG519_KM2^(-1) + LEU*Aminoacylation_MG519_KM3^(-1))^(-1); Aminoacylation_MG519 is "Aminoacylation (MG519)";  // modifiers: MG_266_MONOMER
    Aminoacylation_MG519_KM1 = 1; Aminoacylation_MG519_KM2 = 1; Aminoacylation_MG519_KM3 = 1;
  Aminoacylation_MG520: MG520 + ATP + LEU -> MG520_aa + AMP + PPI; k_tRnaAa_MG520*MG520*ATP*LEU*MG_266_MONOMER*(1 + MG520*Aminoacylation_MG520_KM1^(-1) + ATP*Aminoacylation_MG520_KM2^(-1) + LEU*Aminoacylation_MG520_KM3^(-1))^(-1); Aminoacylation_MG520 is "Aminoacylation (MG520)";  // modifiers: MG_266_MONOMER
    Aminoacylation_MG520_KM1 = 1; Aminoacylation_MG520_KM2 = 1; Aminoacylation_MG520_KM3 = 1;
  Aminoacylation_MG523: MG523 + ARG + ATP -> MG523_aa + AMP + PPI; k_tRnaAa_MG523*MG523*ARG*ATP*MG_378_MONOMER*(1 + MG523*Aminoacylation_MG523_KM1^(-1) + ARG*Aminoacylation_MG523_KM2^(-1) + ATP*Aminoacylation_MG523_KM3^(-1))^(-1); Aminoacylation_MG523 is "Aminoacylation (MG523)";  // modifiers: MG_378_MONOMER
    Aminoacylation_MG523_KM1 = 1; Aminoacylation_MG523_KM2 = 1; Aminoacylation_MG523_KM3 = 1;
end
